64*40 = 2560
N := 128
1/50 = 0.02
fsample := N*50/3 = 2133.33
Δf := fsample/N = 16.6667
2/N = 0.015625
100/Δf = 6
log(128)/log(2) = 7
amp := |31837.97 + 6196i|*2/N = 506.801
|31837.97 + 6196i|*2/N = 506.801
V := 34077.974 + 6196.366i = 34078 + 6196.37i
I := -8924.696 + 20617.675i = -8924.7 + 20617.7i
ϕ := atan(6196.366/34077.974) = 10.3054 deg
δ := atan(20617.675/(-8924.696)) = -66.5938 deg
cos(ϕ - δ) = 0.226663
V - I = 43002.7 - 14421.3i
1.3421 = 76.8967 deg
0.17986 = 10.3052 deg
-1.16228 = -66.5937 deg
180/π*0.17986 = 10.3052
